// SBML level 3 version 2
// Created with PySCeS (1.1.1) on Fri, 28 Jul 2023 17:00:34 by jr

model ITC_Prx_dim_dec()

  // Compartments:
  compartment cell_volume = 1.4;

  // Species:
  substanceOnly species dimers in cell_volume = 0.08148;
  substanceOnly species decamers in cell_volume = 0;

  // Parameters:
  koff = 0.102;
  kon = 0.0927272;
  exponent = 5;
  Kd_app = 1.1;
  injection_volume = 0.0016;
  injection_dimer = 0.002578278;
  injection_decamer = 0.01580434;
  injection_interval = 200;
  first_inject_ratio = 1;

  // Rate rules:
  cell_volume' = 0;

  // Reactions:
  Disassociation: decamers -> 5 dimers; (koff*decamers/cell_volume - kon*(dimers/cell_volume)^exponent)*cell_volume;

  // Events:
  injection_prot: at (cos((time - 1)*2*pi/injection_interval) > 0.99999999): decamers = decamers + injection_decamer, dimers = dimers + injection_dimer, cell_volume = cell_volume + injection_volume;

  // Unit definitions:
  unit substance = 1e-9 mole;
  unit volume = 1e-3 litre;
  unit time = second;
  unit length = metre;
  unit area = metre^2;
end
